// SBML level 2 version 4

model NAD_liver()

  // Compartments:
  compartment default = 1 volume;

  // Species:
  substanceOnly species $L_tryptophan in default = 16; L_tryptophan is "L-tryptophan";
  species L_formyl_kyn in default = 0; L_formyl_kyn is "L_formyl_kyneurenine";
  substanceOnly species $O2 in default = 1000;
  species Hydroxyurenine in default = 0;
  substanceOnly species $NADPH in default = 400;
  species Hydroxyanthranilate in default = 0;
  substanceOnly species Quinolinate in default = 0;
  species NaMN in default = 0;
  substanceOnly species $PRPP in default = 1000;
  substanceOnly species $PPi in default = 1;
  substanceOnly species NaAD in default = 0;
  substanceOnly species NAD in default = 0;
  species NMN in default = 0;
  substanceOnly species $ATP in default = 1000;
  substanceOnly species $NH3 in default = 100;
  substanceOnly species $Glutamine in default = 600;
  substanceOnly species NADP in default = 0;
  species Nam in default = 0;
  substanceOnly species ADPribose in default = 0;
  substanceOnly species ADPriboseP in default = 0;
  species L_kyneurenine in default = 0;
  substanceOnly species $Arginine_protein in default = 1000;
  species NR in default = 0;
  substanceOnly species $P in default = 1000;
  substanceOnly species $R1P in default = 50;
  substanceOnly species $Na in default = 10;
  substanceOnly species $NAD_sink in default = 10;
  substanceOnly species $NADP_sink in default = 10;
  substanceOnly species $s29 in default = 10;
  substanceOnly species $s30 in default = 10;
  substanceOnly species $s31 in default = 10;

  // Parameters:
  J9_Kcat_NADSYN1_Gln = 7.985 substance;
  J9_Et_NADSYN1_Gln = 0.011831863 substance;
  J10_Kcat_NADSYN1_NH3 = 7.985 substance;
  J10_Et_NADSYN1_NH3 = 0.011831863 substance;
  J1_Kcat_TDO = 1.4 substance;
  J1_Et_TDO = 0.021027735 substance;
  J2_Kcat_AFMID = 0.008855 substance;
  J2_Et_AFMID = 0.3896883 substance;
  J3_Kcat_KMO = 2.2 substance;
  J3_Et_KMO = 0.4514211 substance;
  J4_Kcat_KYNU = 0.1435 substance;
  J4_Et_KYNU = 0.31059315 substance;
  J5_Kcat_3HAO = 64 substance;
  J5_Et_3HAO = 3.0634902 substance;
  J6_Kcat_QaPRT = 0.2555 substance;
  J6_Et_QaPRT = 0.25271865 substance;
  J7_Kcat_NMNAT_A = 42.9 substance;
  J7_Et_NMNAT_A = 0.021124193 substance;
  J8_Kcat_NMNAT_B = 53.85 substance;
  J8_Et_NMNAT_B = 0.021124193 substance;
  J11_Kcat_NADK = 21.93 substance;
  J11_Et_NADK = 0.003202389 substance;
  J12_Kcat_NADG = 4.85e-7 substance;
  J12_Et_NADG = 0.04051215 substance;
  J13_Kcat_NADPN = 1.11e-7 substance;
  J13_Et_NADPN = 0.015008787 substance;
  J14_Kcat_PARP = 50.367 substance;
  J14_Et_PARP = 0.4900041 substance;
  J15_Kcat_ARTD = 294.755 substance;
  J15_Et_ARTD = 0.017053686 substance;
  J16_Kcat_NUDT12 = 10.5 substance;
  J16_Et_NUDT12 = 0.04359879 substance;
  J17_Kcat_NAPRT = 0.0077 substance;
  J17_Et_NAPRT = 1.22115195 substance;
  J18_Kcat_NT5E = 8e-10 substance;
  J18_Et_NT5E = 0.036943223 substance;
  J19_Kcat_NRP = 8e-10 substance;
  J19_Et_NRP = 0.558168686 substance;
  J20_Kcat_NRK = 0.581 substance;
  J20_Et_NRK = 0.09067005 substance;
  J21_Kcat_Namase = 1.3e-11 substance;
  J21_Et_Namase = 0.3896883 substance;
  J22_Kcat_NAPRT = 0.25 substance;
  J22_Et_NAPRT = 0.54980775 substance;

  // Reactions:
  J1_TDO: $L_tryptophan + $O2 => L_formyl_kyn; F1*J1_Kcat_TDO*J1_Et_TDO*L_tryptophan*O2/(L_tryptophan*O2 + J1_K_TDO*J1_K_O2 + L_tryptophan*J1_K_O2 + O2*J1_K_TDO);
    J1_V_TDO = 0.029438829 substance; F1 = 1 substance; J1_K_TDO = 222 substance; J1_K_O2 = 42 substance;
  J2_AFMID: L_formyl_kyn => L_kyneurenine; F2*J2_Kcat_AFMID*J2_Et_AFMID*L_formyl_kyn/(L_formyl_kyn + J2_K_AFMID);
    J2_V_AFMID = 0.00345069 substance; F2 = 1 substance; J2_K_AFMID = 50 substance;
  J3_KMO: L_kyneurenine + $NADPH + $O2 => Hydroxyurenine; F3*J3_Kcat_KMO*J3_Et_KMO*L_kyneurenine*NADPH*O2/(K3_Kyn*K3_NADPH*K3_O2)/(1 + L_kyneurenine/K3_Kyn + NADPH/K3_NADPH + O2/K3_O2 + L_kyneurenine*NADPH*O2/(K3_Kyn*K3_NADPH*K3_O2));
    F3 = 1 substance; J3_V_KMO = 0.99312642 substance; K3_Kyn = 100 substance; K3_NADPH = 153 substance; K3_O2 = 71 substance;
  J4_KYNU: Hydroxyurenine => Hydroxyanthranilate; F4*J4_Kcat_KYNU*J4_Et_KYNU*Hydroxyurenine/(J4_k_KYNU*(1 + L_kyneurenine/J_KYNU_ki) + Hydroxyurenine);  // modifiers: L_kyneurenine
    F4 = 1 substance; J4_k_KYNU = 3 substance; J_KYNU_ki = 20 substance; J4_V_KYNU = 0.044570117 substance;
  J5_3HAO: Hydroxyanthranilate + $O2 => Quinolinate; F5*J5_Kcat_3HAO*J5_Et_3HAO*(O2/(1/K5_HAO_O2 + O2))*Hydroxyanthranilate/(1/K5_HAO*(1 + Quinolinate/Ki_QA_5) + Hydroxyanthranilate);
    F5 = 1 substance; J5_V_3HAO = 196.0634 substance; K5_HAO_O2 = 615 substance; K5_HAO = 16 substance; Ki_QA_5 = 1800 substance;
  J6_QaPRT: Quinolinate + $PRPP => NaMN + $PPi; F6*J6_Kcat_QaPRT*J6_Et_QaPRT*Quinolinate*PRPP/(Quinolinate*PRPP + J6_K_QA*J6_K_PRPP + Quinolinate*J6_K_PRPP + PRPP*J6_K_QA);
    F6 = 1 substance; J6_V_QaPRT = 0.064569615 substance; J6_K_QA = 21.6 substance; J6_K_PRPP = 23.2 substance;
  re7: NaMN + $ATP => NaAD + $PPi; F7*J7_Kcat_NMNAT_A*J7_Et_NMNAT_A*NaMN*ATP/(K7_NaMN*K7_ATP)/(1 + NaMN/K7_NaMN + ATP/K7_ATP + NaAD/Ki7_NaAD + PPi/Ki7_PPi); re7 is "J7_V_NMNAT_A";
    F7 = 1 substance; J7_V_NMNAT_A = 0.906227858 substance; K7_NaMN = 67.7 substance; K7_ATP = 58.5 substance; Ki7_NaAD = 502.5 substance; Ki7_PPi = 390.4 substance;
  J8_NMNAT_B: NMN + $ATP => NAD + $PPi; F8*J8_Kcat_NMNAT_B*J8_Et_NMNAT_B*NMN*ATP/(K8_NMN*K8_ATP)/(1 + NMN/K8_NMN + ATP/K8_ATP + NAD/Ki8_NAD + PPi/Ki8_PPi);
    F8 = 1 substance; J8_V_NMNAT_B = 1.137538 substance; K8_NMN = 22.3 substance; K8_ATP = 58.5 substance; Ki8_NAD = 418 substance; Ki8_PPi = 390.4 substance;
  J9_NADSYN1_Gln: $ATP + $Glutamine + NaAD => NAD; F9*J9_Kcat_NADSYN1_Gln*J9_Et_NADSYN1_Gln*ATP*Glutamine*NaAD/(K9_ATP*K9_Gln*K9_NaAD)/(1 + ATP/K9_ATP + Glutamine/K9_Gln + NaAD/K9_NaAD + ATP*Glutamine*NaAD/(K9_ATP*K9_Gln*K9_NaAD));
    F9 = 1 substance; J9_V_NADSYN1_Gln = 0.094477424 substance; K9_ATP = 89 substance; K9_Gln = 1440 substance; K9_NaAD = 490 substance;
  J10_NADSYN1_NH3: NaAD + $ATP + $NH3 => NAD; F10*J10_Kcat_NADSYN1_NH3*J10_Et_NADSYN1_NH3*ATP*NaAD*NH3/(K_10_ATP*K_10_NaAD*K_10_NH3)/(1 + ATP/K_10_ATP + NH3/K_10_NH3 + NaAD/K_10_NaAD + ATP*NH3*NaAD/(K_10_ATP*K_10_NH3*K_10_NaAD));
    F10 = 1 substance; J10_V_NADSYN1_NH3 = 0.094477424 substance; K_10_ATP = 89 substance; K_10_NaAD = 490 substance; K_10_NH3 = 13000 substance;
  J11_NADK: $ATP + NAD => NADP; F11*J11_Kcat_NADK*J11_Et_NADK*NAD*ATP/(K11_ATP*K11_NAD + NAD*K11_ATP + ATP*K11_NAD + NAD*ATP);
    F11 = 1 substance; J11_V_NADK = 0.070228391 substance; K11_ATP = 3300 substance; K11_NAD = 540 substance;
  J12_NADG: NAD => Nam + ADPribose; F12*J12_Kcat_NADG*J12_Et_NADG*NAD/(K12_NAD*(1 + Nam/J12_NADG_Ki_Nam) + NAD);
    F12 = 1 substance; J12_V_NADG = 1.96e-8 substance; K12_NAD = 60 substance; J12_NADG_Ki_Nam = 920 substance;
  J13_NADPN: NADP => Nam + ADPriboseP; F13*J13_Kcat_NADPN*J13_Et_NADPN*NADP/(K13_NADP*(1 + Nam/J13_NADPN_Ki_Nam) + NADP);
    F13 = 1 substance; J13_V_NADPN = 1.66e-9 substance; K13_NADP = 24 substance; J13_NADPN_Ki_Nam = 920 substance;
  J14_PARP: NAD => Nam; F14*J14_Kcat_PARP*J14_Et_PARP*NAD/(K14_NAD*(1 + Nam/Ki14_Nam) + NAD);
    F14 = 1 substance; J14_V_PARP = 24.6800365 substance; K14_NAD = 20 substance; Ki14_Nam = 31 substance;
  J15_ARTD: NAD + $Arginine_protein => Nam; F15*J15_Kcat_ARTD*J15_Et_ARTD*(Arginine_protein/(1/K15_Arg + Arginine_protein))*NAD/(1/K15_NAD*(1 + Nam/Ki_15_Nam) + NAD);
    F15 = 1 substance; J15_V_ARTD = 5.026659 substance; K15_Arg = 3000 substance; Ki_15_Nam = 370 substance; K15_NAD = 36 substance;
  J16_NADTU12: NAD => NMN; F16*J16_Kcat_NUDT12*J16_Et_NUDT12*NAD/(K16_NAD*(1 + NADPH/Ki_16_NADPH) + NAD);  // modifiers: NADPH
    F16 = 1 substance; J16_V_NUDT12 = 0.457787295 substance; K16_NAD = 190 substance; Ki_16_NADPH = 16 substance;
  re17: Nam + $PRPP => NMN; F17*J17_Kcat_NAPRT*J17_Et_NAPRT*Nam*PRPP/(K17_Nam*K17_PRPP)/(1 + Nam/K17_Nam + PRPP/K17_PRPP + NAD/Ki17_NAD); re17 is "J17_NAPRT";  // modifiers: ATP, NAD
    F17 = 1 substance; J17_NAPRT = 1 substance; K17_Nam = 0.005 substance; K17_PRPP = 0.63 substance; Ki17_NAD = 2.1 substance; Ki17_NADH = 3.2 substance;
  J18_NT5E: NMN => $P + NR; F18*J18_Kcat_NT5E*J18_Et_NT5E*NMN/(K_18_NMN*(1 + ATP/Ki18_ATP) + NMN);  // modifiers: ATP
    J18_V_NT5E = 2.9e-11 substance; F18 = 1 substance; K_18_NMN = 4900 substance; Ki18_ATP = 120 substance;
  J19_NRP: NR + $P => Nam + $R1P; F19*J19_Kcat_NRP*J19_Et_NRP*NR*P/(P*NR + J19_K_NR*J19_K_P + NR*J19_K_P + P*J19_K_NR);
    F19 = 1 substance; J19_V_NRP = 4.46e-10 substance; J19_K_NR = 3000 substance; J19_K_P = 100 substance;
  J20_NRK: NR + $ATP => NMN; F20*J20_Kcat_NRK*J20_Et_NRK*NR*ATP/(NR*ATP + J20_K_NR*J20_K_ATP + NR*J20_K_ATP + ATP*J20_K_NR);
    F20 = 1 substance; J20_V_NRK = 0.052679299 substance; J20_K_NR = 5 substance; J20_K_ATP = 330 substance;
  J22_NAPRT: $Na + $PRPP => NaMN + $PPi; F22*J22_Kcat_NAPRT*J22_Et_NAPRT*Na*PRPP/(PRPP*Na + J22_K_Na*J22_K_PRPP + Na*J22_K_PRPP + PRPP*J22_K_Na);  // modifiers: P
    F22 = 1 substance; J22_V_NAPRT = 0.137451938 substance; J22_K_Na = 27.3 substance; J22_K_PRPP = 38.2 substance;
  re23: NAD => $NAD_sink; 1e-6*NAD;
  re25: NADP => $NADP_sink; 0.001*NADP;
  re26: $PPi => $s29; 0.001*PPi;
  re27: ADPriboseP => $s30; 0.001*ADPriboseP;
  re28: ADPribose => $s31; 0.001*ADPribose;

  // Unit definitions:
  unit substance = mole;
  unit volume = litre;
  unit area = metre^2;
  unit length = metre;
  unit time = second;
end
